# Using scaled soft core potentials for free energy calculations

# Define general settings

units real
dimension 3
boundary p p p
atom_style      full

# Define bond, angle, and dihedral style

{%if settings.style.bond|length > 0%}bond_style    {{settings.style.bond|join(' ')}}{%- endif %}
{%if settings.style.angle|length > 0%}angle_style    {{settings.style.angle|join(' ')}}{%- endif %}
{%if settings.style.dihedral|length > 0%}dihedral_style    {{settings.style.dihedral|join(' ')}}{%- endif %}

variable restart equal {{settings.restart}}

if "${restart} == 1" then "read_restart {{settings.restart_file}}" else "read_data       {{settings.data_file}}"

{%- if settings.restart == 1 %}
# Define bond, angle, and dihedral style (after restart)
{%-if settings.style.bond|length > 0%}bond_style    {{settings.style.bond|join(' ')}}{%- endif %}
{%-if settings.style.angle|length > 0%}angle_style    {{settings.style.angle|join(' ')}}{%- endif %}
{%-if settings.style.dihedral|length > 0%}dihedral_style    {{settings.style.dihedral|join(' ')}}{%- endif %}
{%- endif %}

# Define pair style and further settings

pair_style {{settings.style.pair_style}}
pair_modify mix {{settings.style.mixing}} tail {{settings.style.tail}}

# Define the neighbor list settings

neighbor 2.0 bin
neigh_modify every 1 delay 0 check yes

# Define special bonds to scale 1-2, 1-3, or 1-4 vdW / Coulomb pair interactions

special_bonds lj {{settings.sp_bond.vdw|join(' ')}}  coul {{settings.sp_bond.coulomb|join(' ')}}

# Van der Waals interactions
{% if settings.style.pairs_path is defined %}
include {{settings.style.pairs_path}}
{%- else %}
{% for p in settings.style.pairs %}
pair_coeff  {{p.i}} {{p.j}}  mie/cut {{p.epsilon}} {{p.sigma}} {{p.m}} 6.0 # {{p.name}}
{%- endfor %}
{%- endif %}

{%if not settings.style.uncharged %}
# Coulombic interactions

pair_coeff  * * coul/long

# Long range coulombic interaction solver

kspace_style pppm 1e-5
{%- endif %}

# ============= INITIAL SYSTEM SETUP AND EQUILIBRATION =============

# ------------- general ---------------

variable  timestep            equal       {{settings.timestep}}

timestep  ${timestep}

# ------------- set ensemble settings ---------------

# seed value should be passed as variable in job file
variable  seed                index       12345
variable  temperature         equal       {{settings.temperature}}
variable  pressure            equal       {{settings.pressure}}

# ------------- generate velocities ---------------

if "${restart} == 0" then "velocity        all create ${temperature} ${seed} rot yes dist gaussian"

{%- if settings.shake.values()|map('length')|select('>', 0)|first %}
# ------------- shake algorithm ---------------

fix rigid all shake 0.001 100 0 {%- for s in settings.shake %}{%- if settings.shake[s]|length > 0%} {{s}} {{settings.shake[s]|join(' ')}} {%- endif %}{%- endfor %}
{%- endif %}

# ------------- set integration settings ---------------

{% if settings.ensemble == 'NVT' %}
fix             int_nvt all nvt temp ${temperature} ${temperature} $(100.0*v_timestep)
{%- elif settings.ensemble == 'NPT' %}
fix             int_npt all npt temp ${temperature} ${temperature} $(100.0*v_timestep)  iso ${pressure} ${pressure} $(1000.0*v_timestep)
{%- endif %}

# ------------- equilibrate system ---------------

thermo          10000
run             {{settings.equiltime}}
if "${restart} == 0" then "write_restart   {{settings.restart_file}} "
reset_timestep  0

# ============= VARIABLES ===============

# ------------- general ---------------

variable  run_time            equal       {{settings.runtime}}

# ------------- output ---------------

variable  sample_frequency    equal       {{settings.sample_frequency}}
variable  sample_number       equal       {{settings.sample_number}}
variable  to_file_every       equal       $(v_sample_frequency*v_sample_number)
variable  to_screen_every     equal       $(v_to_file_every*10)

# ------------- values ---------------

variable step equal step

# ============= SAMPLING CONDITIONS =============

thermo          ${to_screen_every}
thermo_style    custom step temp press pe ke etotal enthalpy vol density

# Pressure, mass density, and potential energy sampling

variable press equal press
variable mass_dens equal density
variable pot_eng equal pe

fix sampling all ave/time ${sample_frequency} ${sample_number} ${to_file_every} v_press v_mass_dens v_pot_eng file values.sampling

# ============= RUN CONDITIONS =============

run             ${run_time}
